*NODE,NSET=Nall
1, 1.84775906502, 0.76536686473, 0.0
2, 1.30656296488, 1.30656296488, 0.0
3, 0.76536686473, 1.84775906502, 0.0
4, 1.11022302463e-16, 1.84775906502, 0.0
5, -0.76536686473, 1.84775906502, 0.0
6, -1.30656296488, 1.30656296488, 0.0
7, -1.84775906502, 0.76536686473, 0.0
8, -1.84775906502, 2.22044604925e-16, 0.0
9, -1.84775906502, -0.76536686473, 0.0
10, -1.30656296488, -1.30656296488, 0.0
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*ELEMENT,TYPE=B32,ELSET=EAll
1, 1, 2, 3
2, 3, 4, 5
3, 5, 6, 7
4, 7, 8, 9
5, 9, 10, 11
6, 11, 12, 13
7, 13, 14, 15
8, 15, 16, 1
9, 17, 18, 19
10, 19, 20, 21
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*BOUNDARY
1,1,3
3,1,3
5,1,3
7,1,3
9,1,3
11,1,3
13,1,3
15,1,3
274,1,3
276,1,3
278,1,3
280,1,3
*MATERIAL,NAME=WOOD
*ELASTIC
2.5E8,.038
*BEAM SECTION,ELSET=EAll,MATERIAL=WOOD,SECTION=RECT
.125,.292
*STEP
*STATIC
*CLOAD
282,3,-1.
284,3,-1.
286,3,-1.
288,3,-1.
*EL PRINT,ELSET=Eall
S
*EL FILE
S
*NODE FILE
U
*END STEP
